* Test de calcul de deformations
OPTI DIME 2 ELEM QUA4;
LOG1 = 1.;
P1 = 0. 0.;
P2 = 1. 0.;
P3 = 1. 1.;
P4 = 0. 1.;
M1 = MANU QUA4 P1 P2 P3 P4;
Q1 = P1 PLUS P4;
Q2 = P2 PLUS P4;
Q3 = P3 PLUS P4;
Q4 = P4 PLUS P4;
M2 = MANU QUA4 Q1 Q2 Q3 Q4;
M2 = MANU QUA4 Q2 Q3 Q4 Q1;
  M3 = CHAN M2 TRI3;
MAIL1 = M1 ET M2;
ELIM MAIL1 0.0001;
OPTI DIME 3 ELEM CUB8;
MAIL1 = MAIL1 VOLU TRAN 1 (0. 0. 1.);

MODL1 = MODE MAIL1 MECANIQUE ELASTIQUE;

X2 Y2 Z2 = COOR MAIL1;
DEP1 = (EXCO SCAL X2 UX NATURE DIFFUS);
DEP2 = (EXCO SCAL Y2 UY NATURE DIFFUS);
DEP3 = (EXCO SCAL Z2 UZ NATURE DIFFUS);
DEP4 = (EXCO SCAL X2 UY NATURE DIFFUS);
DEP5 = (EXCO SCAL Y2 UZ NATURE DIFFUS);
DEP6 = (EXCO SCAL Z2 UX NATURE DIFFUS);
DEPT1 = DEP1 ET DEP2 ET DEP3;
DEPT1 = DEPT1 +  DEP4 + DEP5 + DEP6;


EPS1 = EPSI LINE DEPT1 MODL1;
EPS2 = EPSI QUAD DEPT1 MODL1;

OPTI SORT 'test_Epsil';
SORT AVS MAIL1 DEPT1;
OPTI SORT 'poub';

FIN;
