* Test de poutre d'Euler-Bernoulli 2D
LTRAC1 = FAUX;

OPTI DIME 2 ELEM SEG2;
P1 = 0. 0.;
P2 = 0. 1.;
P3 = 0.5 1.;
MAIL1 = P1 D 10 P2 D 5 P3;
MODL1 = MODE MAIL1 MECANIQUE ELASTIQUE ISOTROPE POUT;
MATR1 = MATE MODL1 YOUN 1. NU 0.3 SECT 1. INR 1.;
MATR2 = MANU CHML MODL1
  YOUN 1. NU 0. SECT 1. INRZ 1.  GRAVITE;
RIGI1 = RIGI MODL1 MATR1;

X1 Y1 = COOR MAIL1;
XX = (EXCO SCAL ((X1 * Y1) + Y1) UX  NATURE DIFFUS) ET
     (EXCO SCAL (X1 + Y1) UY  NATURE DIFFUS) ET
     (EXCO SCAL (0.1 * (X1 - Y1)) RZ  NATURE DIFFUS);
ERR1 = XTMX RIGI1 XX;
LIST ERR1;
list (ERR1 - 1779.0);
SI LTRAC1;
  DEFO0 = DEFO MAIL1 XX 0. BLAN;
  DEFO1 = DEFO MAIL1 XX ROUG;
  TRAC (DEFO0 ET DEFO1) MAIL1;
  TRAC (EXCO RZ XX) MAIL1;
FINSI;

OPTI SORT 'test_Pout2D_6';
SORT AVS MAIL1 MATR2 XX;
OPTI SORT 'poub';

FIN;
