OPTI DIME 2 ELEM QUA4;
P1 = 0. 0.; P2 = 1. 0.; P3 = 0. 1.;
L1 = P1 D 3 P2;
M1 = L1 TRAN 3 P3;
OPTI ELEM TRI3;
M2 = L1 TRAN 3 (-3. * P3);
* M3 = M1 ET M2 ET L1 ET (M1 CHAN POI1);
M3 = M1 ET M2 ET L1;

C1 = COOR 1 M1;
MO1 = MODE M3 MECANIQUE ELASTIQUE;
C2 = MANU CHML M3 TRUC 1.;
C2 = CHAN GRAVITE MO1 C2;

OPTI SORT 'test_AVS_1';
SORT AVS M3 C1 C2;
OPTI SORT 'poub';
FIN;
