OPTI DIME 2 ELEM QUA4;
P1 = 0. 0.; P2 = 1. 0.; P3 = 0. 1.;
L1 = P1 D 3 P2;
M1 = L1 TRAN 1 P3;
OPTI ELEM TRI3;
M2 = L1 TRAN 1 (3. * P3);
M2 = M2 PLUS (1.1 * P2);
L1 = L1 PLUS (2.2 * P2);
M3 = M1 ET M2 ET L1;

*C1 = COOR 1 M1;
C1 = COOR 1 M3;
MO1 = MODE M3 MECANIQUE ELASTIQUE;
C2 = MANU CHML M3 TRUC 1.;
C2 = CHAN GRAVITE MO1 C2;

M4 = M1 ET M2 ET L1 ET (M1 CHAN POI1);
X Y = COOR M4;
C4 = (EXCO SCAL X UX) ET (EXCO SCAL Y UY);

OPTI SORT 'test_AVS_2';
SORT AVS M3 C1 C2 SUIT;
SORT AVS M4 C4 SUIT;
OPTI SORT 'poub';

*CONT3 = CONT M3;
*SORT AVS CONT3 SUIT;
FIN;
