OPTI DIME 2 ELEM QUA4;

P1 = 0. 0.;
P2 = 1. 0.;
P3 = 0. 1.;
NN1 = 1;
L1 = P1 D NN1 P2;
M1 = L1 TRAN NN1 P3;
M2 = M1 PLUS P3;
M2 = M2 CHAN TRI3;
L1 = L1 MOINS P2;
LI1 = L1 PLUS P3;
LI1 = LI1 CHAN POI1;
M3 = (M1 ET M2) PLUS P2;

OPTI DIME 3 ELEM CUB8;
P4 = 0. 0. 1.;
M3 = M3 VOLU NN1 TRAN P4;

MAIL1 = LI1 ET L1 ET M1 ET M2 ET M3;
MAIL1 = M1;
Q1 = 2. 0. 0.;
Q2 = 2. 1. 0.;
Q3 = 2. 0. 1.;
MAIL2 = MAIL1 SYME PLAN Q1 Q2 Q3;
MAIL2 = MAIL2 CHAN QUAD;

MAILT1 = MAIL1 ET MAIL2;
MAILT1 = MAIL2;


OPTI SORT 'test_AVStoGMSH_1';
SORT AVS MAILT1;

X1 Y1 Z1 = COOR MAILT1;
CHPO1 = (EXCO SCAL X1 UX NATURE DISCRET) ET
        (EXCO SCAL Y1 UY NATURE DISCRET) ET
        (EXCO SCAL Z1 UZ NATURE DISCRET);
OPTI SORT 'test_AVStoGMSH_1a';
SORT AVS CHPO1;

OPTI SORT 'test_AVStoGMSH_1b';
SORT AVS MAILT1 CHPO1;
OPTI SORT 'poub';


FIN;
