OPTI DIME 3 ELEM TE10;

P1 = 0. 0. 0;
Q1 = 0.5 0. 0.;
P2 = 1. 0. 0;
Q2 = 0.5 0.5 0.;
P3 = 0. 1. 0;
Q3 = 0. 0.5 0.;
R1 = 0. 0. 0.5;
R2 = 0.5 0. 0.5;
R3 = 0. 0.5 0.5;
P4 = 0. 0. 1.;

M1 = MANU TE10 P1 Q1 P2 Q2 P3 Q3 R1 R2 R3 P4;
*MAILT1 = M1 CHAN QUAD;
MAILT1 = M1;

OPTI SORT 'test_AVStoGMSH_2';
SORT AVS MAILT1;
OPTI SORT 'poub';

FIN;
