OPTI DIME 2 ELEM SEG2;

P1 = 0. 0.; P2 = 1. 1.; P3 = 1. -2.; P4 = 0. -2.;
L1 = P1 D 1 P2 D 1 P3 D 1 P4;

MODL1 = MODE L1 MECANIQUE ELASTIQUE BARR;
MATR1 = MATE MODL1 YOUN 1. NU 0.3 SECT 1. RHO 2.;
RIGI1 = RIGI MODL1 MATR1;
MASS1 = MASS MODL1 MATR1;

U1 = COOR 1 L1;
U2 = COOR 2 L1;
XX = (EXCO SCAL (U1 * U2) UX NATURE DIFFUS) ET
     (EXCO SCAL (U2 * U2) UY NATURE DIFFUS);
ERR1 = XTMX RIGI1 XX;
list (ERR1 - 8.4142135623);
ERR2 = XTMX MASS1 XX;
list (ERR2 - 84.5522847498307);


OPTI SORT 'test_Barr';
SORT AVS L1 MATR1 XX;
OPTI SORT 'poub';

FIN;
