OPTI DIME 2 ELEM QUA4;
OPTI MODE PLAN CONT;
P1 = 0. 0.; P2 = 1. 0.; P3 = 0. 1.; P4 = 2. 0.;
L1 = P1 D 3 P2;
MM1 = L1 TRAN 1 P3;
M1 = L1;
MMT1 = MM1;

X Y = COOR M1;
C1 = (EXCO SCAL X UX) ET (EXCO SCAL Y UY);

*MOO1 = MODE MMT1 CONVECTION;
MOO1 = MODE MMT1 THERMIQUE;
F1 = FLUX MOO1 1. M1;

OPTI SORT 'test_Compress_3';
SORT AVS M1 F1;
OPTI SORT 'poub';

FIN;
