OPTI DIME 2 ELEM QUA4;
OPTI MODE PLAN CONT;
P1 = 0. 0.; P2 = 1. 0.; P3 = 0. 1.;
L1 = P1 D 3 P2;
M1 = L1 TRAN 2 P3;

X Y = COOR M1;
C1 = (EXCO SCAL X UX) ET (EXCO SCAL Y UY);

MODL1 = MODE M1 MECANIQUE ELASTIQUE;
MATR1 = MATE MODL1 RHO 100.;
RIGI1 = MASS MODL1 MATR1;
XVAL1 = XTMX C1 RIGI1;
list (XVAL1 - 66.666);
MESS 'XVAL1' XVAL1;
OPTI SORT 'test_Mass_1';
SORT AVS M1 C1;
OPTI SORT 'poub';

FIN;
