* Test de l'element 3D TET4
* Permeabilite = conductivite
OPTI DIME 2 ELEM TRI3;
P1 = 0. 0.;
P2 = 2. 0.;
P3 = 3. 1.;
P4 = 0. 2.;
M1 = MANU QUA4 P1 P2 P3 P4;
M1 = M1 CHAN TRI3;

OPTI DIME 3 ELEM TET4;
MAIL1 = M1 VOLU TRAN 1 (0. 0. 1.);
MAIL1 = MAIL1 CHAN TET4;
MODL1 = MODE MAIL1 THERMIQUE;
MATR1 = MATE MODL1 K 1.;
MATR2 = MANU CHML MODL1 PERM 1. VISC 1. GRAVITE;
RIGI1 = CONDU MODL1 MATR1;
X Y Z = COOR MAIL1;
X = (X ** 3.2) + Y;
Y = Y - X;
C1 = (EXCO SCAL X T NATURE DIFFUS);
C2 = (EXCO T C1 P NATURE DIFFUS);
XVAL1 = XTMX C1 RIGI1;
list (XVAL1);
list (XVAL1 - 835.94790923249645);
MESS 'XVAL1' XVAL1;

OPTI SORT 'test_Perm_5';
SORT AVS MAIL1 C2 MATR2;
OPTI SORT 'poub';

FIN;
