* Test du raccord de poutres
OPTI DIME 2 ELEM SEG2;

LTRAC1 = FAUX;

P1 = 0. 0.; P2 = 100. -100.; P3 = 200. 0.; O1 = 100. 0.;
*P1 = 0. 0.; P2 = 100. 0.; P3 = 200. 0.; O1 = 100. 0.;
N1 = 2048;
N1 = 16;
L1 = (CERC N1 P1 O1 P2) ET (CERC N1 P2 O1 P3);
*L1 = (DROI N1 P1 P2) ET (DROI N1 P2 P3);

MODL1 = MODE L1 MECANIQUE ELASTIQUE POUT;
MATR1 = MATE MODL1 YOUN 1. NU 0. SECT 1. INRZ 1.;
RIGI1 = RIGI MODL1 MATR1;

FEXT1 = MANU CHPO P3 2 FX 0. FY 1. NATURE DISCRET;
BLOQ1 = (BLOQ DEPL P1) ET (BLOQ RZ P1);
RIGIT1 = RIGI1 ET BLOQ1;
DEPL1 = RESO RIGIT1 FEXT1;
DEFO0 = DEFO DEPL1 L1 0. BLANC;
DEFO1 = DEFO DEPL1 L1 0.00001 ROUG;
SI (LTRAC1); TRAC (DEFO0 ET DEFO1); FINSI;

MESS 'N1' N1 'U1' (EXTR DEPL1 UY P3);

C1 = FEXT1 ET (MANU CHPO P1 1 UD 1. NATURE DISCRET);

OPTI SORT 'test_Pout_4';
SORT AVS L1 C1 MATR1;
OPTI SORT 'poub';

FIN;
