OPTI DIME 2 ELEM QUA4;
OPTI MODE PLAN CONT;
* OPTI MODE PLAN DEFO;
P1 = 0. 0.; P2 = 1. 0.; P3 = 0. 1.;
L1 = P1 D 3 P2;
M1 = L1 TRAN 2 P3;

X Y = COOR M1;
C1 = (EXCO SCAL X UX) ET (EXCO SCAL Y UY);

MODL1 = MODE M1 MECANIQUE ELASTIQUE;
MATR1 = MATE MODL1 YOUNG 1. NU 0.3;
RIGI1 = RIGI MODL1 MATR1;
XVAL1 = XTMX C1 RIGI1;
list (XVAL1 - 2.8571);
MESS 'XVAL1' XVAL1;
list (xval1 - 3.8461538462);
MESS 'XVAL1' XVAL1;

OPTI SORT 'test_Rigi_1';
SORT AVS M1 C1 MATR1;
OPTI SORT 'poub';

FIN;
