* On teste les QUA8
OPTI DIME 2 ELEM QUA8;
OPTI MODE PLAN CONT;
P1 = -1. -1.; P2 = 1. -0.8; P3 = 0. 2.;
L1 = P1 D 3 P2; M1 = L1 TRAN 2 P3;
*L1 = P1 D 1 P2; M1 = L1 TRAN 1 P3;

X Y = COOR M1;
C1 = ((EXCO SCAL X UX) ** 2) ET (EXCO SCAL Y UY);

MODL1 = MODE M1 MECANIQUE ELASTIQUE;
MATR1 = MATE MODL1 YOUN 1 NU 0.3;
RIGI1 = RIGI MODL1 MATR1;
XVAL1 = XTMX C1 RIGI1;
list (XVAL1 - 10.256410256);
MESS 'XVAL1' XVAL1;

OPTI SORT 'test_Rigi_1b';
SORT AVS M1 C1;
OPTI SORT 'poub';

FIN;
