OPTI DIME 2 ELEM QUA4;

LTRAC1 = FAUX;

P1 = 0. 0.; P2 = 3. 0.; P3 = 0. 3.;
L1 = P1 D 3 P2;
M1 = L1 TRAN 3 P3;
*L1 = P1 D 30 P2;
*M1 = L1 TRAN 30 P3;
MODL1 = MODE M1 MECANIQUE ELASTIQUE;
C1 = MANU CHML MODL1 SCAL 0. GRAVITE;
XC1 = COOR 1 C1;
YC1 = COOR 2 C1;
I1 = MASQ XC1 SUPERIEUR -1.;
CC1 = (-2. * (MASQ XC1 INFERIEUR 1.)) + I1;
CC2 = MASQ YC1 SUPERIEUR 1.;
C0 = ((CC1 * CC2) * (YC1 / 10.)) + I1;
SI (LTRAC1); TRAC C0 MODL1 M1; FINSI;

OPTI SORT 'test_SmoothChamno';
SORT AVS M1 C0;
OPTI SORT 'poub';

FIN;
