OPTI DIME 2 ELEM QUA4;
P1 = 0. 0.; P2 = 1. 0.; P3 = 0. 1.;
L1 = P1 D 3 P2;
M1 = L1 TRAN 2 P3;

X Y = COOR M1;
C1 = (EXCO SCAL X UX) ET (EXCO SCAL Y UY);

OPTI SORT 'test_Vect_1';
SORT AVS M1 C1;
OPTI SORT 'poub';

FIN;
