OPTI DIME 2 ELEM QUA4;
P1 = 0. 0.; P2 = 1. 0.; P3 = 0. 1.;
L1 = P1 D 3 P2;
M1 = L1 TRAN 2 P3;
M2 = L1 TRAN 2 (-1. * P3);

X Y = COOR M1;
C1 = (EXCO SCAL X UX) ET (EXCO SCAL Y UY);
T1 = COOR 2 M2;
C2 = EXCO SCAL T1 T;

CC1 = MANU CHML M1 'TOTO' 1. 'TUTU' 2.;
MO1 = M1 MODE MECANIQUE ELASTIQUE;
CC2 = MANU CHML MO1 'TITI' 3. 'TATA' 4. 'GRAVITE';


OPTI SORT 'test_Vect_2';
SORT AVS M1 C1 CC1 SUIT;
SORT AVS M2 C2 SUIT;
OPTI SORT 'poub';

FIN;
